*Heading
** Job name: Job-1 Model name: Model-1
** Generated by: Abaqus/CAE Learning Edition 2025
*Preprint, echo=NO, model=NO, history=NO, contact=NO
**
** PARTS
**
*Part, name=Part-1
*Node
      1,   9.00968838,   4.33883762,           0.
      2,   6.23489809,   7.81831503,           0.
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*Element, type=C3D8R
  1,  51,  50,  73,  74,  11,  10,  33,  34
  2,  51,  74,  75,  52,  11,  34,  35,  12
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*Nset, nset=Set-1, generate
   1,  200,    1
*Elset, elset=Set-1, generate
   1,  128,    1
** Section: Section-1
*Solid Section, elset=Set-1, material=Material-1
,
*End Part
**
**
** ASSEMBLY
**
*Assembly, name=Assembly
**
*Instance, name=Part-1-1, part=Part-1
*End Instance
**
*Instance, name=Part-1-2, part=Part-1
         22.,           0.,           0.
*End Instance
**
*Nset, nset=Set-1, instance=Part-1-1, generate
 161,  200,    1
*Nset, nset=Set-1, instance=Part-1-2, generate
 161,  200,    1
*Elset, elset=Set-1, instance=Part-1-1, generate
  97,  128,    1
*Elset, elset=Set-1, instance=Part-1-2, generate
  97,  128,    1
*Nset, nset=Set-2, instance=Part-1-1, generate
   1,  200,    1
*Nset, nset=Set-2, instance=Part-1-2, generate
   1,  200,    1
*Elset, elset=Set-2, instance=Part-1-1, generate
   1,  128,    1
*Elset, elset=Set-2, instance=Part-1-2, generate
   1,  128,    1
*Nset, nset=Set-3, instance=Part-1-1, generate
   1,  200,    1
*Nset, nset=Set-3, instance=Part-1-2, generate
   1,  200,    1
*Elset, elset=Set-3, instance=Part-1-1, generate
   1,  128,    1
*Elset, elset=Set-3, instance=Part-1-2, generate
   1,  128,    1
*Elset, elset=_Surf-1_S2, internal, instance=Part-1-1, generate
  1,  32,   1
*Elset, elset=_Surf-1_S2, internal, instance=Part-1-2, generate
  1,  32,   1
*Surface, type=ELEMENT, name=Surf-1
_Surf-1_S2, S2
*End Assembly
**
** MATERIALS
**
*Material, name=Material-1
*Elastic
 1e+06, 0.3
**
** BOUNDARY CONDITIONS
**
** Name: BC-1 Type: Symmetry/Antisymmetry/Encastre
*Boundary
Set-1, ENCASTRE
**
** PREDEFINED FIELDS
**
** Name: Predefined Field-1   Type: Temperature
*Initial Conditions, type=TEMPERATURE
Set-2, 70.
** ----------------------------------------------------------------
**
** STEP: trans
**
*Step, name=trans, nlgeom=NO
*Static
1., 10., 0.0001, 1.
**
** LOADS
**
** Name: Load-1   Type: Pressure
*Dsload
Surf-1, P, 1.
**
** PREDEFINED FIELDS
**
** Name: Predefined Field-2   Type: Temperature
*Temperature
Set-3, 100.
**
** OUTPUT REQUESTS
**
*Restart, write, frequency=0
**
** FIELD OUTPUT: F-Output-1
**
*Output, field
*Node Output
COORD, NT
*Element Output, directions=YES
COORD, S
*Output, history, frequency=0
*End Step
** ----------------------------------------------------------------
**
** STEP: final
**
*Step, name=final, nlgeom=NO
*Static
0.5, 2., 2e-05, 1.
**
** OUTPUT REQUESTS
**
*Restart, write, frequency=0
**
** FIELD OUTPUT: F-Output-1
**
*Output, field
*Node Output
COORD, NT
*Element Output, directions=YES
COORD, S
*Output, history, frequency=0
*End Step
